<?xml version="1.0" encoding="UTF-8"?>
<neuroml xmlns="http://www.neuroml.org/schema/neuroml2" xmlns:xsi="http://www.w3.org/2001/XMLSchema-instance" xsi:schemaLocation="http://www.neuroml.org/schema/neuroml2  https://raw.githubusercontent.com/NeuroML/NeuroML2/development/Schemas/NeuroML2/NeuroML_v2beta5.xsd" id="C160802A_validSplitting">

    <!-- soma -->
    <include href="na_s.channel.nml"/>
    <include href="kdr.channel.nml"/>
    <include href="k.channel.nml"/>
    <include href="cal.channel.nml"/>

    <!-- dend -->
    <include href="cah.channel.nml"/>
    <include href="kca.channel.nml"/>
    <include href="h.channel.nml"/>
    <include href="ca.nml"/>

    <!-- axon -->
    <include href="na_a.channel.nml"/>

    <!-- all  -->
    <include href="leak.channel.nml"/>

    <cell id="C160802A">

        <notes>Cell morphology generated by neuroConstruct from file: C160802A_validSplitting.swc
Generated by neuTube (http://www.neutracing.com)</notes>

        <morphology id="morphology_C160802A">

            <segment id="0" name="Comp_1">
                <proximal x="0.0" y="0.0" z="0.0" diameter="15.034"/>
                <distal x="0.0" y="0.0" z="0.0" diameter="15.034"/>
            </segment>

            <segment id="1" name="Comp_2">
                <parent segment="0" fractionAlong="0.5"/>
                <proximal x="0.0" y="0.0" z="0.0" diameter="3.0068"/>
                <distal x="11.5546" y="1.63325" z="4.25236" diameter="3.0068"/>
            </segment>

            <segment id="2" name="Comp_3">
                <parent segment="0" fractionAlong="0.5"/>
                <proximal x="0.0" y="0.0" z="0.0" diameter="2.422"/>
                <distal x="4.49675" y="6.39517" z="1.07074" diameter="2.422"/>
            </segment>

            <segment id="3" name="Comp_4">
                <parent segment="2"/>
                <proximal x="4.49675" y="6.39517" z="1.07074" diameter="3.278"/>
                <distal x="8.08916" y="10.5176" z="0.7" diameter="3.278"/>
            </segment>

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
            <segmentGroup id="Soma" neuroLexId="sao864921383">    <!--
                This group contains an unbranched set of segments, and all of the segmentGroups marked with
                neuroLexId = sao864921383 form a non-overlapping set of all of the segments.
                These segmentGroups correspond to the 'cables' of NeuroML v1.8.1. -->

                <member segment="0"/>
            </segmentGroup>

            <segmentGroup id="Sec_Comp_2" neuroLexId="sao864921383">    <!--
                This group contains an unbranched set of segments, and all of the segmentGroups marked with
                neuroLexId = sao864921383 form a non-overlapping set of all of the segments.
                These segmentGroups correspond to the 'cables' of NeuroML v1.8.1. -->

                <member segment="1"/>
            </segmentGroup>

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
            <segmentGroup id="soma_group" neuroLexId="GO:0043025">    <!--Soma group-->

                <include segmentGroup="Soma"/>
            </segmentGroup>

            <segmentGroup id="Colour_White">
                <include segmentGroup="Soma"/>
            </segmentGroup>

            <segmentGroup id="axon_group" neuroLexId="GO:0030424">    <!--Axon group-->

                <include segmentGroup="Sec_Comp_2"/>
            </segmentGroup>

            <segmentGroup id="Colour_DarkGrey">
                <include segmentGroup="Sec_Comp_2"/>
            </segmentGroup>

            <segmentGroup id="dendrite_group" neuroLexId="GO:0030425">    <!--Dendrite group-->

                <include segmentGroup="Sec_Comp_3"/>
                <include segmentGroup="Sec_Comp_4"/>
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            </segmentGroup>

            <segmentGroup id="custom-1">
                <include segmentGroup="Sec_Comp_3"/>
                <include segmentGroup="Sec_Comp_4"/>
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            </segmentGroup>

            <segmentGroup id="Colour_Red">
                <include segmentGroup="Sec_Comp_3"/>
                <include segmentGroup="Sec_Comp_4"/>
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            </segmentGroup>

            <segmentGroup id="custom-2">
                <include segmentGroup="Sec_Comp_6"/>
                <include segmentGroup="Sec_Comp_11"/>
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            </segmentGroup>

            <segmentGroup id="Colour_Blue">
                <include segmentGroup="Sec_Comp_6"/>
                <include segmentGroup="Sec_Comp_11"/>
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            </segmentGroup>

            <segmentGroup id="custom-n">
                <include segmentGroup="Sec_Comp_97"/>
                <include segmentGroup="Sec_Comp_146"/>
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            </segmentGroup>

            <segmentGroup id="Colour_Yellow">
                <include segmentGroup="Sec_Comp_97"/>
                <include segmentGroup="Sec_Comp_146"/>
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            </segmentGroup>

        </morphology>

            <!--Adding the biophysical parameters-->

        <biophysicalProperties id="biophys">

            <membraneProperties>
                <!-- soma -->
                <channelDensity condDensity="30 mS_per_cm2" id="na_s_soma" segmentGroup="soma_group" ionChannel="na_s" ion="na" erev="55 mV"/>
                <channelDensity condDensity="30 mS_per_cm2" id="kdr_soma" segmentGroup="soma_group"
                ionChannel="kdr" ion="k" erev="-75 mV"/>
                <channelDensity condDensity="15 mS_per_cm2" id="k_soma" segmentGroup="soma_group"
                ionChannel="k" ion="k" erev="-75 mV"/>
                <channelDensity condDensity="20 mS_per_cm2" id="cal_soma" segmentGroup="soma_group"
                ionChannel="cal" ion="ca" erev="120 mV"/>

                <!-- dendrite 10 35 25-->
                <channelDensity condDensity="10 mS_per_cm2" id="cah_dend" segmentGroup="custom-1" ionChannel="cah" ion="ca" erev="120 mV"/>
                <channelDensity condDensity="35 mS_per_cm2" id="kca_dend" segmentGroup="custom-1" ionChannel="kca" ion="k" erev="-75 mV"/>
                <channelDensity condDensity="25 mS_per_cm2" id="h_dend" segmentGroup="custom-1" ionChannel="h" ion="h" erev="-43 mV"/>

                <!-- axon -->
                <channelDensity condDensity="200 mS_per_cm2" id="na_axon" segmentGroup="axon_group" ionChannel="na_a" ion="na" erev="55 mV"/>
                <channelDensity condDensity="200 mS_per_cm2" id="k_axon" segmentGroup="axon_group" ionChannel="k" ion="k" erev="-75 mV"/>

                <channelDensity condDensity="1.3e-2 mS_per_cm2" id="leak_soma" segmentGroup="soma_group" ionChannel="leak" ion="non_specific" erev="10 mV"/>
                <channelDensity condDensity="1.3e-2 mS_per_cm2" id="leak_axon" segmentGroup="axon_group" ionChannel="leak" ion="non_specific" erev="10 mV"/>
                <channelDensity condDensity="1.3e-2 mS_per_cm2" id="leak_dend_prox" segmentGroup="custom-1" ionChannel="leak" ion="non_specific" erev="10 mV"/>
                <channelDensity condDensity="1.3e-2 mS_per_cm2" id="leak_dend_dist" segmentGroup="custom-2" ionChannel="leak" ion="non_specific" erev="10 mV"/>

                <spikeThresh value="0 mV"/>
                <specificCapacitance value="1 uF_per_cm2"/>
                <initMembPotential value="-65.0 mV"/>

            </membraneProperties>

            <intracellularProperties>
                <species segmentGroup="custom-1" id="ca" ion="ca" concentrationModel="ca_conc" initialConcentration="3.7152 mM" initialExtConcentration="3.0mM"/>

                <resistivity value="100 ohm_cm" segmentGroup="soma_group"/>
                <resistivity value="100 ohm_cm" segmentGroup="axon_group"/>
                <resistivity value="100 ohm_cm" segmentGroup="custom-1"/>
                <resistivity value="100 ohm_cm" segmentGroup="custom-2"/>
                <resistivity value="100 ohm_cm" segmentGroup="custom-n"/>

            </intracellularProperties>

        </biophysicalProperties>

    </cell>

</neuroml>
