<neuroml xmlns="http://www.neuroml.org/schema/neuroml2"  xmlns:xs="http://www.w3.org/2001/XMLSchema" xmlns:xsi="http://www.w3.org/2001/XMLSchema-instance" xsi:schemaLocation="http://www.neuroml.org/schema/neuroml2 https://raw.github.com/NeuroML/NeuroML2/development/Schemas/NeuroML2/NeuroML_v2.3.1.xsd" id="Cx35mutant_L7_6dpf_Arch_LC_2_a">
    <notes>

****************************************
This NeuroML file was converted from SWC to NeuroML format by Sietse Reissenweber's converter.
For any questions regarding the conversion, you can email me at s.reissenweber12@gmail.com.
The notes listed below are the notes that were originally contained in the SWC file.
****************************************

########################################

SWC to SWC conversion from L-Measure. Sridevi Polavaram: spolavar@gmu.edu
Original fileName:C:\Users\Carolina\Desktop\Quality_Check\postprocessing\Sitaraman_Final\Source_Temp1//Cx35mutant_L7_6dpf_Arch_LC_2_a.CNG.swc

SWC to SWC conversion from L-Measure. Sridevi Polavaram: spolavar@gmu.edu
Original fileName:Z:\ToBackup\Brittany\_postprocessing\Sitarama_Split_Final\Source_Temp1//Cx35mutant_L7_6dpf_Arch_LC_2_a.BS1.swc

SWC to SWC conversion from L-Measure. Sridevi Polavaram: spolavar@gmu.edu
Original fileName:C:\NMO_dev\data_proc\Sitaraman_Final\Source_Temp1//Cx35mutant_L7_6dpf_Arch_LC_2.CNG.swc

ORIGINAL_SOURCE
CREATURE
REGION
FIELD/LAYER
TYPE
CONTRIBUTOR
REFERENCE
RAW
EXTRAS
SOMA_AREA
SHRINKAGE_CORRECTION
VERSION_NUMBER
VERSION_DATE
*********************************************
SCALE 1.0 1.0 1.0

########################################

</notes>
    <cell id="Cx35mutant_L7_6dpf_Arch_LC_2_a_cell">
        <morphology id="Cx35mutant_L7_6dpf_Arch_LC_2_a_cell">
            <segmentGroup id="bas_dend_1" neuroLexId="SAO:864921383">
                <member segment="1"/>
                <member segment="2"/>
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            </segmentGroup>
            <segmentGroup id="bas_dend_2" neuroLexId="SAO:864921383">
                <member segment="23"/>
                <member segment="24"/>
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            </segmentGroup>
            <segmentGroup id="bas_dend_3" neuroLexId="SAO:864921383">
                <member segment="61"/>
                <member segment="62"/>
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            </segmentGroup>
            <segmentGroup id="bas_dend_4" neuroLexId="SAO:864921383">
                <member segment="95"/>
                <member segment="96"/>
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            </segmentGroup>
            <segmentGroup id="bas_dend_5" neuroLexId="SAO:864921383">
                <member segment="102"/>
                <member segment="103"/>
                <member segment="104"/>
                <member segment="105"/>
            </segmentGroup>
            <segmentGroup id="bas_dend_6" neuroLexId="SAO:864921383">
                <member segment="137"/>
                <member segment="138"/>
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            </segmentGroup>
            <segmentGroup id="bas_dend_7" neuroLexId="SAO:864921383">
                <member segment="278"/>
            </segmentGroup>
            <segmentGroup id="bas_dend_8" neuroLexId="SAO:864921383">
                <member segment="279"/>
                <member segment="280"/>
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            </segmentGroup>
            <segmentGroup id="bas_dend_9" neuroLexId="SAO:864921383">
                <member segment="303"/>
                <member segment="304"/>
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            </segmentGroup>
            <segmentGroup id="bas_dend_10" neuroLexId="SAO:864921383">
                <member segment="0"/>
            </segmentGroup>
            <segmentGroup id="bas_dend_11" neuroLexId="SAO:864921383">
                <member segment="22"/>
            </segmentGroup>
            <segmentGroup id="bas_dend_12" neuroLexId="SAO:864921383">
                <member segment="49"/>
                <member segment="50"/>
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            </segmentGroup>
            <segmentGroup id="bas_dend_13" neuroLexId="SAO:864921383">
                <member segment="80"/>
                <member segment="81"/>
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            </segmentGroup>
            <segmentGroup id="bas_dend_14" neuroLexId="SAO:864921383">
                <member segment="94"/>
            </segmentGroup>
            <segmentGroup id="bas_dend_15" neuroLexId="SAO:864921383">
                <member segment="106"/>
                <member segment="107"/>
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            </segmentGroup>
            <segmentGroup id="bas_dend_16" neuroLexId="SAO:864921383">
                <member segment="124"/>
                <member segment="125"/>
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            </segmentGroup>
            <segmentGroup id="bas_dend_17" neuroLexId="SAO:864921383">
                <member segment="239"/>
                <member segment="240"/>
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            </segmentGroup>
            <segmentGroup id="all">
                <include segmentGroup="bas_dend_1"/>
                <include segmentGroup="bas_dend_2"/>
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            </segmentGroup>
            <segmentGroup id="dendrite_group" neuroLexId="SAO:1211023249">
                <include segmentGroup="bas_dend_1"/>
                <include segmentGroup="bas_dend_2"/>
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            </segmentGroup>
            <segmentGroup id="basal_group" neuroLexId="SAO:1079900774">
                <include segmentGroup="bas_dend_1"/>
                <include segmentGroup="bas_dend_2"/>
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            </segmentGroup>
        </morphology>
        <biophysicalProperties id="Cx35mutant_L7_6dpf_Arch_LC_2_a_cell_properties">
            <membraneProperties>
                <spikeThresh value="0.0 mV"/>
                <specificCapacitance value="1.0 uF_per_cm2"/>
                <initMembPotential value="-60.0 mV"/>
            </membraneProperties>
            <intracellularProperties>
                <resistivity value="0.03 kohm_cm"/>
            </intracellularProperties>
        </biophysicalProperties>
    </cell>
</neuroml>
